# PART 1 - Classic ODE Solutions
# Equation representing complete differential equation:
y(t) := e^(-100*t)*(9*cos(10^7*t) + 9*10^-5*sin(10^7*t))
t := 0, .0001 .. .035
# Plot signal itself vs. time:
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# Plotting magnitude of signal squared vs. time:
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# _______________________________________________________________________________
# PART 2 - Classic ODE Solutions
# Define all variables:
ω_o := 10^7
b := 100
ω := 8.7*10^6, 8.71*10^6 .. 1.12*10^7
# Solve for the gain of the system, in dB:
G(ω) := ω_o^2/sqrt((ω_o^2 - ω^2)^2 + 4*b^2*ω^2)
1.5915*10^6*2*π = 9999689
G_dB(ω) := 20*log(G(ω))
1.7825*10^6*2*π = 11199778
1.3846*10^6*2*π = 8699698
# Plot Gain of the system vs. Frequency - Hz vs. dB:
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# Calculate bandwidth (BW) of system, in Hz:
ω_Center := ω_o
ω_Center = 10000000  # Rad/s
ω_Center_Hz := ω_Center/(2*π)
ω_Center_Hz = 1591549  # Hz
G_max := ω_o^2/sqrt(4*b^2*ω_o^2)
G_max = 50000
G_max_dB := 20*log(G_max)
G_max_dB = 93.9794  # dB
Define
guess := 9*10^6
Given
G_max/2 == ω_o^2/sqrt((ω_o^2 - guess^2)^2 + 4*b^2*guess^2)
ω_2 := Find(guess)
ω_2_Hz := ω_2/(2*π)
ω_1 := 2*ω_Center - ω_2
ω_2 = 10000173  # rad/s
ω_2_Hz = 1591577  # Hz
ω_1_Hz := ω_1/(2*π)
ω_1 = 9999827  # rad/s
ω_1_Hz = 1591522  # Hz
Bandwidth := ω_2 - ω_1
Bandwidth_Hz := ω_2_Hz - ω_1_Hz
# FINAL BANDWIDTH:
Bandwidth = 346.405  # rad/s
Bandwidth_Hz = 55.1321  # Hz
