# PART 1 Stuff
y(t) := e^(-100*t)*(9*cos(10^7*t) + 9*10^-5*sin(10^7*t))
t := 0, .0001 .. .035
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# _______________________________________________________________________________
# PART 2 Stuff
ω_o := 10^7
b := 100
ω := 9.999*10^6, 9.99900001*10^6 .. 1.0001*10^7
G(ω) := ω_o^2/sqrt((ω_o^2 - ω^2)^2 + 4*b^2*ω^2)
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ω_Center := ω_o
ω_Center = 10000000
G_max := ω_o^2/sqrt(4*b^2*ω_o^2)
G_max = 50000
Define
guess := 9*10^6
Given
G_max/2 == ω_o^2/sqrt((ω_o^2 - guess^2)^2 + 4*b^2*guess^2)
ω_2 := Find(guess)
ω_2 = 10000173
ω_1 := 2*ω_Center - ω_2
ω_1 = 9999827
Bandwidth := ω_2 - ω_1
Bandwidth = 346.405
