θ := 0.1
x := 1
f(x, θ) := -34.44 + 3971.53*10^3*tan(θ) - 0.5*9.81*(3971.53*10^3/(x*cos(θ)))^2
g(θ) := root(f(x, θ), x)
θ := 0.001, .002 .. π/2
g(θ) =  # no stored result
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x := 0.01, .1 .. 10000
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t := 0, .11 .. 900
f(t) := -34.44 + 6241.88*t*sin(π/4) - 0.5*9.81*t^2
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