# Carlos Lazo
# Beam Propagation Through Optical Systems
# ELDP 2008 Guided Demonstration
# Input Parameters:
# DEFINITION: ==========================>
mrad := 10^-3*rad
# Laser Wavelength ==>
λ := 4.6 μm
# Beam Quality ==>
M_sq := 2.5
# Beam Divergence* out of the resonator =>
θ_o := 24*mrad
# Far-field Beam Divergence* ==>
θ_ff := 2.26*mrad
# Distance from waist to F1 ==>
a := 40 mm
# Telescope length ==>
d := 20 mm
# Near-field beam waist from F2 ==>
b := 500 mm
# * Divergence = full angle at 1/e^2 points.
# Lens thickness ==>
t := 3 mm
# Index of refraction, ZnSe ==>
N := 2.43
# Input Beam Parameters (D_O, θ_O, E, Zr):
E := 4*λ/π*M_sq
E = 14.6423 mm*mrad
θ_o = 24 mrad
D_o := E/θ_o
D_o = 610.094 μm
zr := D_o/θ_o
zr = 25.4206 mm
q := [1i*zr/mm; 1]
# We can calculate some answers using equations, without knowing R1 & R2.
# In far-field ==>
θ_ff = 2.26 mrad
# New waist diameter ==>
D_new := E/θ_ff
D_new = 6.47887 mm
# Beam diameter on lens 1 ==>
D_lens_1 := sqrt(D_o^2 + a^2*θ_o^2)
D_lens_1 = 1.13746 mm
# We can use these values to check our calculation below.
Zo(q) := Re(q[0]*mm*q[1]^-1)  # Distance from the RP to the waist in this region.
Zr(q) := Im(q[0]*mm*q[1]^-1)  # Rayleigh range in this region.
# Beam Divergence at far-field in this region.
θ(q) := sqrt(E*Zr(q)^-1)
D_waist(q) := sqrt(E*Zr(q))  # Beam diameter at waist in this region (not at the RP).
D_RP(q) := sqrt(-E*Im((q[0]*mm*q[1]^-1)^-1)^-1)  # Beam diameter at the RP (not at the waist).
R(q) := Re((q[0]*mm*q[1]^-1)^-1)^-1  # Radius of curvature of beam at the RP.
# When does D_waist = D_RP ?
# Describe the optimal configuration:
Lens1(R_1) := [1, 0; -(1 - N)*mm/R_1, 1]*[1, t/(mm*N); 0, 1]
Lens2(R_2) := [1, t/(mm*N); 0, 1]*[1, 0; -(N - 1)*mm/R_2, 1]
ABCD(R_1, R_2) := [1, b/mm; 0, 1]*Lens2(R_2)*[1, d/mm; 0, 1]*Lens1(R_1)*[1, a/mm; 0, 1]
ABCD(100 mm, 50 mm) = [-9.98155, -177.057; -0.0224796, -0.498937]
|ABCD(100 mm, 50 mm)| = 1
CORRECT
# Calculate the radii of curvature which satisfy the requirements:
# Beam in -
Q[0] := [1i*zr/mm; 1]
Q[0] = [25.4206i; 1]
# Define function -
Q(R_1, R_2) := ABCD(R_1, R_2)*Q[0]
# Assume initial values -
R_1 := 100 mm
R_2 := 100 mm
# Constraints -
Given
(1)
Zo(Q(R_1, R_2)) == 0 mm
(2)
θ(Q(R_1, R_2)) == 2.26*mrad
# Go Mathcad!
[R_1; R_2] := Find(R_1, R_2)
[R_1; R_2] = [6.64838; 34.6854] mm
# CHECK ==>
Zo(Q(R_1, R_2)) = -7.92211e-8 m
θ(Q(R_1, R_2)) = 2.26 mrad
# At RP1, beam waist:
Q_0 := [1i*zr/mm; 1]
D_RP(Q_0) = 0.610094 mm
D_waist(Q_0) = 0.610094 mm
# Into lens 1:
Q_1 := [1, a/mm; 0, 1]*Q_0
D_RP(Q_1) = 1.13746 mm
# Out of lens 1:
Q_2 := Lens1(R_1)*Q_1
D_RP(Q_2) = 1.16258 mm
# ** Diameter doesn't change much in lens.
# Into lens 2:
Q_3 := [1, d/mm; 0, 1]*Q_2
D_RP(Q_3) = 6.57716 mm
# Out of lens 2
# into tunnel:
Q_4 := Lens2(R_2)*Q_3
D_RP(Q_4) = 6.57668 mm
# ** Diameter doesn't change much in lens.
# Waist, midway
# through tunnel:
Q_5 := [1, 500 mm/mm; 0, 1]*Q_4
D_RP(Q_5) = 6.47887 mm
D_waist(Q_5) = 6.47887 mm
# End of tunnel:
Q_6 := [1, 500 mm/mm; 0, 1]*Q_5
D_RP(Q_6) = 6.57668 mm
# * Waist in middle
# Beam same size at each end.
# Alignment Tolerances ==> Beam Errors
# Longitudinal, δz  ==> Beam Diameter (near-field), Divergence (far-field)
M(0) == [A, B; C, D]
M(δz) == [1, -δz; 0, 1]*[A, B; C, D]*[1, δz; 0, 1]
Lens1(δz) := [1, -δz/mm; 0, 1]*[1, 0; -(1 - N)*mm/R_1, 1]*[1, t/(mm*N); 0, 1]*[1, δz/mm; 0, 1]
Lens2(δz) := [1, -δz/mm; 0, 1]*[1, t/(mm*N); 0, 1]*[1, 0; -(N - 1)*mm/R_2, 1]*[1, δz/mm; 0, 1]
Q_out(δz_1, δz_2) := [1, b/mm; 0, 1]*Lens2(δz_2)*[1, d/mm; 0, 1]*Lens1(δz_1)*[1, a/mm; 0, 1]*Q_0
# Divergence Error:
μrad := 10^-6*rad
θ(Q_out(0, 0)) = 2.26 mrad
Δθ(δz_1, δz_2) := θ(Q_out(δz_1, δz_2)) - 2.26*mrad  # ERROR
δz_1 := 1*mil
Δθ(δz_1, 0)/δz_1 = -29.831 μrad/mil
δz_2 := 1*mil
Δθ(0, δz_2)/δz_2 = 63.4376 μrad/mil
Δθ/μrad == (-29.831*δz_1/mil) + (63.438*δz_2/mil)  # SENSITIVITY
Δθ_RMS/μrad == sqrt((-29.831*δz_1/mil)^2 + (63.438*δz_2/mil)^2)
# Nominal alignment tolerance:
δz := 1*mil
Δθ_RMS := 70.102*μrad*(δz/mil)
Δθ_RMS = 70.102 μrad
Requirement
Δθ_RMS/θ < 5 %
Δθ_RMS/(2.26*mrad) = 3.10186 %
# We can satisfy the error requirements with nominal δz = 1 mil alignment.
# If requirement is 1%, then:
δz_reqd := 1 %*(2.26*mrad)/(70.102*μrad/mil)
δz_reqd = 0.322387 mil
δz_nom := 1.0*mil
# Beam diameter error:
D_RP(Q_out(0, 0)) = 6.47887 mm  # no error
ΔD(δz_1, δz_2) := D_RP(Q_out(δz_1, δz_2)) - 6.479 mm  # error
δz_1 := 1*mil
ΔD(δz_1, 0)/δz_1 = 0.135428 mm/mil
# Sensitivity
δz_2 := 1*mil
ΔD(0, δz_2)/δz_2 = -0.133497 mm/mil
ΔD/mm == (0.135*δz_1/mil) + (-.133*δz_2/mil)  # If δz_1 = δz_2, then ΔD = 0, nearly, why:
# If all errors are uncorrected,
# then RMS the components.
ΔD_RMS/mm == sqrt((.135*δz_1/mil)^2 + (-.133*δz_2/mil)^2)
# Nominal alightment tolerance:
δz := 1*mil
ΔD_RMS := .190 mm*(δz/mil)
ΔD_RMS = 0.19 mm
# Requirement
ΔD_RMS < .2 mm  # Lucky!
# Transverse Alignment Tolerance {δx,δa} ==> Beam Diameter (near-field),
# Divergence (far-field)
Lens1(δx, δa) := [1, 0, -δx/mm; 0, 1, -δa; 0, 0, 1]*[1, 0, 0; -(1 - N)*mm/R_1, 1, 0; 0, 0, 1]*[1, t/(mm*N), 0; 0, 1, 0; 0, 0, 1]*[1, 0, δx/mm; 0, 1, δa; 0, 0, 1]
Lens2(δx, δa) := [1, 0, -δx/mm; 0, 1, -δa; 0, 0, 1]*[1, t/(mm*N), 0; 0, 1, 0; 0, 0, 1]*[1, 0, 0; -(N - 1)*mm/R_2, 1, 0; 0, 0, 1]*[1, 0, δx/mm; 0, 1, δa; 0, 0, 1]
M(δx_1, δx_2, δa_1, δa_2) := [1, b/mm, 0; 0, 1, 0; 0, 0, 1]*Lens2(δx_2, δa_2)*[1, d/mm, 0; 0, 1, 0; 0, 0, 1]*Lens1(δx_1, δa_1)*[1, a/mm, 0; 0, 1, 0; 0, 0, 1]
ΔX == M[0, 2]
M(δx_1, δx_2, δa_1, δa_2) == [A, B, ΔX; C, D, ΔA; 0, 0, 1]
ΔA == M[1, 2]
ΔX(δx_1, δx_2, δa_1, δa_2) := mm*M(δx_1, δx_2, δa_1, δa_2)[0, 2]
ΔA(δx_1, δx_2, δa_1, δa_2) := M(δx_1, δx_2, δa_1, δa_2)[1, 2]
δx := 1*mil
δa := 1 deg
ΔX(δx, 0, 0, 0)/δx = 0.589705 mm/mil
# Change in position of beam
# due to lens displacement.
ΔX(0, δx, 0, 0)/δx = -0.524884 mm/mil
ΔX(0, 0, δa, 0)/δa = 0.0765358 mm/deg
# Change in position of beam
# due to tilt of lens.
ΔX(0, 0, 0, δa)/δa = 0.0215473 mm/deg
ΔA(δx, 0, 0, 0)/δx = 0.958512 mrad/mil
# Change in angle of beam
# due to lens displacement.
ΔA(0, δx, 0, 0)/δx = -1.04718 mrad/mil
ΔA(0, 0, δa, 0)/δa = -0.0752213 mrad/deg
# Change in angle of beam
# due to tilt of lens.
ΔA(0, 0, 0, δa)/δa = 0 mrad/deg
ΔX/mm == (0.590*δx_1/mil) + (-0.525*δx_2/mil)
ΔA/mrad == (0.959*δx_1/mil) + (-1.047*δx_2/mil)
# If errors are random and uncorrelated, and δx1_RMS = δx2_RMS = δz
ΔX_RMS/mm == sqrt(0.590^2 + (-.525)^2)*δx/mil
ΔA_RMS/mrad == sqrt(0.959^2 + (-1.047)^2)*δx/mil
δx := 1*mil
ΔX_RMS := (0.790*δx/mil)*mm
ΔA_RMS := (1.420*δx/mil)*mrad
ΔX_RMS = 0.79 mm
ΔA_RMS = 1.42 mrad
# ** With random δx such that δx_RMS = 1mil, the expectation value of the beam - **
# decenter at b = 500 mm is  0.8 mm
# tilt in the far-field is  1.42 mrad
# If the requirement is ΔX_RMS < 0.2 mm, then
δx_reqd := 1*mil*0.2 mm/(0.790 mm)
δx_reqd = 0.253165 mil
# If requirement is ΔA_RMS < 0.5 mrad, then
δx_reqd := 1*mil*0.5*mrad/(1.42*mrad)
δx_reqd = 0.352113 mil
# If you can sense whtn ΔA = 0 (use a camera), then adjust δx_2 until ΔA_align = 0!
ΔA_align == 0
0.959*δx_1/mil + (-1.047*δx_2/mil) == 0
δx_2 == 0.959/1.047*δx_1
# And the decenter?
ΔX_align/mm == (0.590*δx_1/mil) + (-0.525*0.959/1.047*δx_1/mil)
ΔX_align := 0.11*mm  # < 0.2mm!
# Comments:
#
# These results are nicely summarized in an alignment sensitivity table ==>
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