# Carlos Lazo
# Beam Propagation through Optical Systems
# ELDP 2008 Homework Assignment
# Technical Brief - ATIRCM Optical Design
# (I) Describe the design problem.
# Identify the assumed parameters and performance requirements.
# The ELDP Class of 2011 received a guided demonstration in modeling an optical system for the ATIRCM laser based on specific requirements.  The initial design shown incorperated a two lens design, as shown below.
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# We have now been asked to perform the analysis of an optical system for the ATIRCM laser based on given assumptions and information.  We are using a single lens design, as seen below.
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# D_2
# We are told that the material used for the lens is CaF2 glass at a wavelength of 4000 nm.  Using www.luxpop.com, we see that at a temperature of 25 deg C at the given wavelength, the index of refraction N = 1.40964 .
# We are given the following Input Parameters:
# Define the unit mrad for calculations ==>
mrad := 10^-3*rad
# Index of refraction, CaF2 ==>
N := 1.40964
# Laser Wavelength ==>
λ := 4.0 μm
# Beam Quality ==>
M_sq := 2.9
# Beam Divergence* out of the resonator ==>
θ_o := 22*mrad
# Far-field Beam Divergence* ==>
θ_ff := 2.1*mrad
# Distance from waist to F1 ==>
a := 40 mm
# Lens thickness ==>
d := 20 mm
# Near-field beam waist from F2 ==>
b := 500 mm
# * Divergence = full angle at 1/e^2 points.
# Calculate Input Beam Parameters (E,D_O,zr,q):
# Etendue ==>
E := 4*λ/π*M_sq = 0.0147696 mm
# Waist diameter ==>
D_o := E/θ_o = 0.671344 mm
# Rayleigh range ==>
zr := D_o/θ_o = 30.5157 mm
# Complex radius of curvature ==>
q := [1i*zr/mm; 1] = [30.5157i; 1]
# Define Paraxial Beam Functions:
Zo(q) := Re(q[0]*mm*q[1]^-1)  # ==> Distance from the RP to the waist in this region.
Zr(q) := Im(q[0]*mm*q[1]^-1)  # ==> Rayleigh range in this region.
θ(q) := sqrt(E*Zr(q)^-1)  # ==> Beam Divergence at far-field in this region.
D_waist(q) := sqrt(E*Zr(q))  # ==> Beam diameter at waist in this region (not at the RP).
D_RP(q) := sqrt(-E*Im((q[0]*mm*q[1]^-1)^-1)^-1)  # ==> Beam diameter at the RP (not at the waist).
R(q) := Re((q[0]*mm*q[1]^-1)^-1)^-1  # ==> Radius of curvature of beam phase at the RP.
# (II) Present the Mathcad analysis, with comments for each
# step regarding what and how; then clearly summarize the
# results relative to the requirement.
# 1) Calculate the ABCD matrix for this new configuration. Check to see if the signs make sense.
# Develop the lens equation.  For the ELDP lens, there will be two surface transitions (L matrix) and one
# translation through the actual lens material (T matrix).
Lens(R_1, R_2) := [1, 0; -1*(1 - N)*mm/R_2, 1]*[1, d/(N*mm); 0, 1]*[1, 0; -1*(N - 1)*mm/R_1, 1]
# The center of curvature for both lens radii are opposite (on the left of) the respective outgoing rays.
# This signifies that R_1 and R_2 are negative.  They are left as unsigned variables to verify this claim.
ABCD(R_1, R_2) := [1, b/mm; 0, 1]*Lens(R_1, R_2)*[1, a/mm; 0, 1]
# Check to see if this ABCD matrix is correct by seeing if the determinant = 1.
|ABCD(-100 mm, -100 mm)| = 1  # ABCD matrix definition is fine!
# 2) Calculate R_1 and R_2 for which the two constraints are satisfied.
# Verify these R's satisfy the two constraints.
# Define general Q function ==>
Q(R_1, R_2) := ABCD(R_1, R_2)*q
# Assume initial R guess values ==>
R_1 := -100 mm
R_2 := -100 mm
# Define radius of curvature constraints ==>
Given
# Constraint (1):
Zo(Q(R_1, R_2)) == 0 mm  # ==> Waist at correct location.
# Constraint (2):
θ(Q(R_1, R_2)) == 2.1*mrad  # ==> Create correct divergence.
# Find respective radii of curvature ==>
[R_1; R_2] := Find(R_1, R_2) = [-1.11808; -6.87789] mm
# Check to see if these radii make sense by plugging values back into the original constraints:
Zo(Q(R_1, R_2)) = 1.21267e-7 m  # This value is approximately 0. Fulfills Constraint (1).
R_1_orig := R_1
R_2_orig := R_2
θ(Q(R_1, R_2)) = 2.1 mrad
# This value is 2.1 mrad.
# Fulfills constraint (2).
# Save the current radii solutions
# for future use in part 9).
# 3) Calculate the beam diameter at:
#
# - R1
# - R2 surface (entrance to ATIRCM)
# - 500mm from the R2 surface (middle of ATIRCM)
# - 1000mm from the R2 surface (exit of ATIRCM)
# - Lens diameter must be less than 2R. Why? See full question below.
# At RP1, beam waist:
Q_0 := [1i*zr/mm; 1]
D_RP(Q_0) = 0.671344 mm
D_waist(Q_0) = 0.671344 mm
# R1 (entrance to lens):
Q_1 := [1, a/mm; 0, 1]*Q_0
D_RP(Q_1) = 1.10684 mm
# R2 (exit of lens):
Q_2 := Lens(R_1, R_2)*Q_1
D_RP(Q_2) = 7.11108 mm
# 500mm from R2:
Q_500 := [1, 500 mm/mm; 0, 1]*Q_2
D_RP(Q_500) = 7.03313 mm
# 1000mm from R2:
Q_1000 := [1, 1000 mm/mm; 0, 1]*Q_2
D_RP(Q_1000) = 7.11108 mm
# Lens diameter must be less than 2R.  Why? The lens diameter should be at least 3 beam diameters IF they are not to clip the beam.  Can these two requirements be satisfied? A common size is 0.5 in diameter.  Is that okay?
# Based off of strict geometric principles, this fact must be true.  Given that both surfaces on each side
# are looking to be completely spherical in nature, this constraint has to be satisfied.  This would also aid
# in making the lens manufacturing more cost-effective, in some cases.
# 4) Calculate the alignment sensitivity matrix of this lens.
μrad := 10^-6*rad
# Alignment Tolerances ==> Beam Errors | Define μrads.
# Longitudinal, δz ==> Beam Diameter (near-field), Divergence (far-field).
# Since there is only one lens, there will only be one set of alignment errors: δa, δx, δz.
ABCD(0) == [A, B; C, D]
ABCD(δz) == [1, -δz; 0, 1]*[A, B; C, D]*[1, δz; 0, 1]
Lens(δz) := [1, -δz/mm; 0, 1]*Lens(R_1, R_2)*[1, δz/mm; 0, 1]
Q_out(δz) := [1, b/mm; 0, 1]*Lens(δz)*[1, a/mm; 0, 1]*Q_0
# Divergence Error:
θ(Q_out(0)) = 2.1 mrad
δz := 1*mil
Δθ(δz) := θ(Q_out(δz)) - 2.1*mrad  # ==> Error.
Δθ(δz)/δz = -0.712343 μrad/mil
Δθ/μrad == (-0.712*δz/mil)
Δθ_RMS/μrad == sqrt((-0.712*δz/mil)^2)
# If all errors are uncorrected, then RMS the components.
# With the single lens design, this simply makes the magnitude positive.
# Nominal alignment tolerance:
Δθ_RMS := .712*μrad*(δz/mil)  # =======> Therefore =======>
Δθ_RMS = 0.712 μrad
# Beam diameter error:
D_RP(Q_out(0)) = 7.03313 mm  # No error.
ΔD(δz) := D_RP(Q_out(δz)) - 7.033 mm  # Error.
ΔD(δz)/δz = 0.00252009 mm/mil  # Sensitivity.
ΔD/mm == (.00252*δz/mil)
ΔD_RMS/mm == sqrt((.00252*δz/mil)^2)
# If all errors are uncorrected, then RMS the components.
# With the single lens design, this simply makes the magnitude positive.
# Nominal aligntment tolerance:
ΔD_RMS := .00252 mm*(δz/mil)  # =======> Therefore =======>
ΔD_RMS = 2.52 μm
# Transverse Alignment Tolerance {δx,δa} ==> Beam Diameter (near-field),
# Divergence (far-field)
Lens(δx, δa) := [1, 0, -δx/mm; 0, 1, -δa; 0, 0, 1]*[1, 0, 0; -1*(1 - N)*mm/R_2, 1, 0; 0, 0, 1]*[1, d/(N*mm), 0; 0, 1, 0; 0, 0, 1]*[1, 0, 0; -1*(N - 1)*mm/R_1, 1, 0; 0, 0, 1]*[1, 0, δx/mm; 0, 1, δa; 0, 0, 1]
M(δx, δa) := [1, b/mm, 0; 0, 1, 0; 0, 0, 1]*Lens(δx, δa)*[1, a/mm, 0; 0, 1, 0; 0, 0, 1]
ΔX == M[0, 2]
ΔX(δx, δa) := mm*M(δx, δa)[0, 2]
M(δx, δa) == [A, B, ΔX; C, D, ΔA; 0, 0, 1]
ΔA == M[1, 2]
ΔA(δx, δa) := M(δx, δa)[1, 2]
δx := 1*mil
δa := 1 deg
ΔX(δx, 0)/δx = 0.0967391 mm/mil
# Change in position of beam
# due to lens displacement.
# NEGLIGIBLE
ΔX(0, δa)/δa = -7.12659 mm/deg
# Change in position of beam
# due to tilt of lens.
ΔA(δx, 0)/δx = -0.0705883 mrad/mil
# Change in angle of beam
# due to lens displacement.
# NEGLIGIBLE
ΔA(0, δa)/δa = -14.7484 mrad/deg
# Change in angle of beam
# due to tilt of lens.
# Comments:
#
# These results are nicely summarized in an alignment sensitivity table ==>
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# 5) Are the nominal ailgnment tolerances adequate?  Assume δz = 1mil (0.001 in);
# δx = 1mil; δa = 1 degree (be careful).  Calculate the errors, and RMS them together,
# and find the % error.  Is the one-lens design less senstive to alignment tolerances
# than the two lens design?
# --- For beam divergence error as calculated in part (4):
Δθ_RMS = 0.712 μrad
# Recall that:
θ(Q_out(0)) = 2.1 mrad
Δθ_RMS/(2.1*mrad) = 0.0339048 %
# ===========> Requirement:
Δθ_RMS/θ < 5 %  # Requirement is met!
# NEGLIGIBLE
# --- For beam diameter error as calculated in part (4) :
ΔD_RMS = 0.00252 mm
# Recall that:
D_RP(Q_out(0)) = 7.03313 mm
ΔD_RMS/(7.033 mm) = 0.0358311 %
# This shows that the system design is INSENSITIVE to
# lens displacement error.
# NEGLIGIBLE
# --- For tranverse alignment tolerances ~
# ΔX (Beam Diameter) and ΔA (Divergence):
ΔX/mm == -7.127*δx/mil
ΔA/mrad == (-14.748*δx/mil)
ΔX_RMS/mm == sqrt((-7.127)^2)*δx/mil
ΔA_RMS/mrad == sqrt((-14.748)^2)*δx/mil
ΔX_RMS := (7.127*δx/mil)*mm
ΔA_RMS := (14.748*δx/mil)*mrad
ΔX_RMS = 7.127 mm
ΔA_RMS = 14.748 mrad
# These two values show that the lens design is too sensitive to changes in the tilt of the lens.
#
# Overall, the one-lens design is more sensitive to alignment tolerances.  The single-lens design is affected by changes in lens tilt, while the double-lens design is affected by changes in lens displacement.  The single lens changes far more drastically per change in tilt than the double lens design per change in displacement.
# 6) If the manufacturing tolerances for each of the radii of curvature is ΔR/R = 2%,
# calculate the RMS error of the beam divergance target.
# For reference:
R_1 = -0.00111808 m
R_2 = -0.00687789 m
# Rewrite the lens equation to account for possible changes in R_1 and R_2:
Lens(R_1, R_2) := [1, 0; -1*(1 - N)*mm/R_2, 1]*[1, d/(N*mm); 0, 1]*[1, 0; -1*(N - 1)*mm/R_1, 1]
Q_out(R_1, R_2) := [1, b/mm; 0, 1]*Lens(R_1, R_2)*[1, a/mm; 0, 1]*Q_0
# Divergence Error:
θ(Q_out(R_1, R_2)) = 2.1 mrad
Δθ(R_1, R_2) := θ(Q_out(R_1, R_2)) - 2.1*mrad  # ERROR
# Define all of the new possible radii given the manufacturing tolerance conditions:
R_1μ_pos := R_1 + (R_1*(-.02))
R_1μ_pos = -0.00109572 m
R_1μ_neg := R_1 + (R_1*.02)
R_1μ_neg = -0.00114045 m
R_2μ_pos := R_2 + (R_2*(-.02))
R_2μ_pos = -0.00674034 m
R_2μ_neg := R_2 + (R_2*.02)
R_2μ_neg = -0.00701545 m
# Calculate all 8 different Δθ based on all radii combinations:
# Keeping R_1 constant and changing R_2:
C1 := Δθ(R_1, R_2μ_pos) = 7.09126 mrad
C2 := Δθ(R_1, R_2μ_neg) = 6.1598 mrad
# Changing R_1 and keeping R_2 constant:
C3 := Δθ(R_1μ_pos, R_2) = 0.16231 mrad
C4 := Δθ(R_1μ_neg, R_2) = 0.513187 mrad
# Changing R_1 and  R_2 ^in all cases:
C5 := Δθ(R_1μ_pos, R_2μ_pos) = 5.97764 mrad
C6 := Δθ(R_1μ_pos, R_2μ_neg) = 7.53193 mrad
C7 := Δθ(R_1μ_neg, R_2μ_pos) = 8.16664 mrad
C8 := Δθ(R_1μ_neg, R_2μ_neg) = 4.85947 mrad
# Take the RMS value of all eight cases and divide by 8 to calculate the true RMS value.
Δθ_RMS := sqrt((C1^2 + C2^2 + C3^2 + C4^2 + C5^2 + C6^2 + C7^2 + C8^2)/8)
Δθ_RMS = 5.82333 mrad
# 7) Comparing the beam errors due to misalignment of the two-lens design with the
# one-lens design, which is less sensitive to alignment tolerances?
# Based on all tolerances calculated both for the double-lens design and the single-lens design, the
# double-lens design is less sensitive to alignment tolerances.  While it does go under changes when
# beam is displaced, the error is not as bad in magnitude as the single-lens design with lens tilt.
# 8)  How temperature dependant is the beam divergence angle?
# We neglect the slight temperature dependance of the index of refraction, and
# assume the system is aligned.  Calculate the beam divergence at T = -20C, +25C,
# and +40C.  Does it meet the requirement over the entire temperature range?
# Define the coefficients of thermal expansion for the lens materials and traversal through the material:
CTE_Al := 24.0*10^-6
# Recall that:
R_1 = -0.00111808 m
R_2 = -0.00687789 m
CTE_CaF2 := 4.0*10^-6
# Now that all values are temperature dependant, parametrize all necessary variables.
# These would be a, b, R_1, R_2, and d.
a_μ(T) := a*(1 + CTE_Al*(T - 25))
b_μ(T) := b*(1 + CTE_Al*(T - 25))
R_1(T) := R_1*(1 + CTE_CaF2*(T - 25))
R_2(T) := R_2*(1 + CTE_CaF2*(T - 25))
d(T) := d*(1 + CTE_CaF2*(T - 25))
# Redefine the lens equation to include all temperature dependant variables:
Lens(T) := [1, 0; -1*(1 - N)*mm/R_2(T), 1]*[1, d(T)/(N*mm); 0, 1]*[1, 0; -1*(N - 1)*mm/R_1(T), 1]
Q_out(T) := [1, b_μ(T)/mm; 0, 1]*Lens(T)*[1, a_μ(T)/mm; 0, 1]*Q_0
# Calculate Divergence Error:
θ(Q_out(25)) = 2.1 mrad
Δθ(T) := θ(Q_out(T)) - θ(Q_out(25))  # Calculate error.
Δθ_RMS(T) := sqrt(Δθ(T)^2)
# Calculate error for all of the required temperatures.
Δθ_RMS(-20) = 1.30965 μrad
Δθ_RMS(25) = 0 μrad
Δθ_RMS(40) = 0.436101 μrad
# Based off these values, calculate the percent change associated with the temperature changes:
P_error_neg20 := Δθ_RMS(-20)/θ_ff = 0.0623642 %  # Stays within the 5% requirement.
P_error_pos25 := Δθ_RMS(25)/θ_ff = 0 %  # Stays within the 5% requirement.
P_error_pos40 := Δθ_RMS(40)/θ_ff = 0.0207667 %  # Stays within the 5% requirement.
# ALL temperature values stay well within the theta requirement.
# The lens meets the requirement over the entire temperature range.
# 9) In ATIRCM, the wavelength is not 4.0μm, but rather a spectrum from 3μm to 5μm.
# The design for λ = 4mμ is a compromise.  Use LUXPOP to find the index of refraction
# at 3mμ and 5μm, and calculate the change in beam divergence.  Does it meet the
# 5% requirement over the spectral range?
# For 3μm, redefine Input Parameters:
# Index of refraction, CaF2 ==>
N := 1.41785
# Laser Wavelength ==>
λ := 3.0 μm
# Beam Quality ==>
M_sq := 2.9
# Beam Divergence* out of the resonator =>
θ_o := 22*mrad
# Far-field Beam Divergence* ==>
θ_ff := 2.1*mrad
# Distance from waist to F1 ==>
a := 40 mm
# Lens thickness ==>
d := 20 mm
# Near-field beam waist from F2 ==>
b := 500 mm
# * Divergence = full angle at 1/e^2 points.
# Calculate Input Beam Parameters (D_O, θ_O, E, Zr):
E := 4*λ/π*M_sq
E = 11.0772 mm*mrad
D_o := E/θ_o
D_o = 0.503508 mm
zr := D_o/θ_o
zr = 22.8867 mm
q := [1i*zr/mm; 1]
q = [22.8867i; 1]
# Paraxial Beam Functions:
Zo(q) := Re(q[0]*mm*q[1]^-1)  # Distance from the RP to the waist in this region.
Zr(q) := Im(q[0]*mm*q[1]^-1)  # Rayleigh range in this region.
# Beam Divergence at far-field in this region.
θ(q) := sqrt(E*Zr(q)^-1)
D_waist(q) := sqrt(E*Zr(q))  # Beam diameter at waist in this region (not at the RP).
D_RP(q) := sqrt(-E*Im((q[0]*mm*q[1]^-1)^-1)^-1)  # Beam diameter at the RP (not at the waist).
R(q) := Re((q[0]*mm*q[1]^-1)^-1)^-1  # Radius of curvature of beam phase at the RP.
# Alignment Tolerances ==> Beam Errors
# Longitudinal, δz  ==> Beam Diameter (near-field), Divergence (far-field)
Lens := [1, 0; -1*(1 - N)*mm/R_2_orig, 1]*[1, d/(N*mm); 0, 1]*[1, 0; -1*(N - 1)*mm/R_1_orig, 1]
Q_0 := [1i*zr/mm; 1]
Q_out := [1, b/mm; 0, 1]*Lens*[1, a/mm; 0, 1]*Q_0
# Divergence Error:
θ_3μ := θ(Q_out) = 4.92333 mrad
θ_4μ := 2.1*mrad
Δθ_3μm := θ_3μ - θ_4μ = 2.82333 mrad
P_error_3mμ := Δθ_3μm/θ_ff = 134.444 %
# For 5μm, redefine Input Parameters:
# Index of refraction, CaF2 ==>
N := 1.39896
# Laser Wavelength ==>
λ := 5.0 μm
# Beam Quality ==>
M_sq := 2.9
# Beam Divergence* out of the resonator =>
θ_o := 22*mrad
# Far-field Beam Divergence* ==>
θ_ff := 2.1*mrad
# Distance from waist to F1 ==>
a := 40 mm
# Lens thickness ==>
d := 20 mm
# Near-field beam waist from F2 ==>
b := 500 mm
# * Divergence = full angle at 1/e^2 points.
# Calculate Input Beam Parameters (D_O, θ_O, E, Zr):
E := 4*λ/π*M_sq
E = 18.462 mm*mrad
D_o := E/θ_o
D_o = 0.839181 mm
zr := D_o/θ_o
zr = 38.1446 mm
q := [1i*zr/mm; 1]
q = [38.1446i; 1]
# Define Paraxial Beam Functions:
Zo(q) := Re(q[0]*mm*q[1]^-1)  # Distance from the RP to the waist in this region.
Zr(q) := Im(q[0]*mm*q[1]^-1)  # Rayleigh range in this region.
# Beam Divergence at far-field in this region.
θ(q) := sqrt(E*Zr(q)^-1)
D_waist(q) := sqrt(E*Zr(q))  # Beam diameter at waist in this region (not at the RP).
D_RP(q) := sqrt(-E*Im((q[0]*mm*q[1]^-1)^-1)^-1)  # Beam diameter at the RP (not at the waist).
R(q) := Re((q[0]*mm*q[1]^-1)^-1)^-1  # Radius of curvature of beam phase at the RP.
# Alignment Tolerances ==> Beam Errors
# Longitudinal, δz  ==> Beam Diameter (near-field), Divergence (far-field)
Lens := [1, 0; -1*(1 - N)*mm/R_2_orig, 1]*[1, d/(N*mm); 0, 1]*[1, 0; -1*(N - 1)*mm/R_1_orig, 1]
Q_0 := [1i*zr/mm; 1]
Q_out := [1, b/mm; 0, 1]*Lens*[1, a/mm; 0, 1]*Q_0
# Divergence Error:
θ_4μ := 2.1*mrad
θ_5μ := θ(Q_out) = 6.77544 mrad
Δθ_5μm := θ_5μ - θ_4μ = 4.67544 mrad
P_error_5mμ := Δθ_5μm/θ_ff = 222.64 %
# TO RECAP:
P_error_3mμ := Δθ_3μm/θ_ff = 134.444 %
P_error_5mμ := Δθ_5μm/θ_ff = 222.64 %
# These errors are completely unacceptable.  They go above and beyond in violating the 5%
# error requirement.  It's clear that changing the wavelength drastically alters the divergence error.
# 10) Based upon these sensitivities, recommend one of the two designs for implementation.
# Based of the respective analyses of both optical systems,
# I would personally recommend the two-lens system design.
#
# The ELDP optical system is extremely sensitive to lens tilt, and in the long run, could cost an excessive amount of money to maintain in proper alignment given the specific requirements.  While the two-lenses are sensitve to lens displacement, this would be more cost effective to correct and maintain over time.
# (III) Concluding remakrks.  What insights or useful knowledge/
# skills have you acquired?
# This assignment gave me the ability to explore a completely new topic: Beam Propagation through Optical Systems.
# Having never looked at a laser system, it was great understanding the model from both a mathematical and physical point of view.  In using the lecture slides and the guided demonstration, we were able to design a 'real world' potential design for an optical system and make necessary comparisons.  This added a nice sense of reality to the problem that is lacking at many college classes.  I had also never used the Mathcad tool before, and will now consider using it for any future technical briefs of this nature.  It was a good exercise.
#
# Thank you for your time.
