# Analysis for worst case loading scenario - Emergency Landing 9G Front Load
#
# Note: It is assumed that aircraft can support the 150 maximum load capacity defined by the customer. This analysis substantiates the antenna mounting hardware and design
Load_Factor_Front := 9*g
Mass_Antenna := 20.4 kg  # Maximum Weight of Antenna Assembly
Load := Mass_Antenna*Load_Factor_Front
Load = 404.769 lbf
# Calculate the Margins of Safety for the Mounting Hardware
Screw_Yield_Shear := 739 lbf  # Characteristic for #8 SS screw
Screw_Yield_Tension := 637 lbf  # Characteristic for #8 SS screw
Num_Screws := 6
# Conservative Assumption: Loading acts in shear
MS_Screw_Shear := Screw_Yield_Shear*Num_Screws/Load - 1
MS_Screw_Shear = 9.9544
# VERY HIGH!
MS_Screw_Tension := Screw_Yield_Tension*Num_Screws/Load - 1
MS_Screw_Tension = 8.44243
# VERY HIGH!
# Calculate the Drag Forces on the Antenna Assembly Cover
Area := 2*(21295.8*mm^2 + 21295.6 mm^2 + 2772.9 mm^2 + 7944.83*mm^2 + 5179.1 mm^2) + 92248.5 mm^2
Area = 0.209225 m^2
C_d := 0.1  # Note this term is approximated based on shape and material
Velocity := 44.4*m/s
ρ_air := 1.2041*kg/m^3  # The density of dry air for 20C
F_d := 1/2*Velocity^2*ρ_air*C_d*Area  # Applied Drag Force
F_d = 24.832 N
P_d := F_d/Area
# Applied Drag Pressure
P_d = 118.686 Pa
Yield_Stress_6061T6 := 276 MPa
Max_Stress_Simulation := 0.692 MPa
Safety_Factor := 1.5
MS_Stress := Yield_Stress_6061T6/(Max_Stress_Simulation*Safety_Factor) - 1
MS_Stress = 264.896
# VERY HIGH!
